<Lems>
    <Include file="Cells.xml"/>
    <Include file="Networks.xml"/>
    <Include file="Inputs.xml"/>
    <Include file="Simulation.xml"/>
    <Include file="single_cell.nml"/>

    <Simulation id="sim1" length="500ms" step="0.1ms" target="singleCellNetwork"/>

    <Target component="sim1"/>
</Lems>
