<neuroml xmlns="http://www.neuroml.org/schema/neuroml2" id="GlifCellTypes">

  <ComponentType name="GLIF1Cell" extends="baseCell">
    <Parameter name="C" dimension="capacitance"/>
    <Parameter name="gL" dimension="conductance"/>
    <Parameter name="EL" dimension="voltage"/>
    <Parameter name="vth" dimension="voltage"/>
    <Parameter name="vreset" dimension="voltage"/>
    <Parameter name="t_ref" dimension="time"/>

    <Attachments name="synapses" type="basePointCurrent"/>

    <EventPort name="spike" direction="out"/>
    <Exposure name="v" dimension="voltage"/>
    <Exposure name="iSyn" dimension="current"/>

    <Dynamics>
      <StateVariable name="v" dimension="voltage" exposure="v"/>
      <StateVariable name="refractoryTimeElapsed" dimension="time"/>
      <DerivedVariable name="iSyn" dimension="current" exposure="iSyn" select="synapses[*]/i" reduce="add"/>

      <OnStart>
        <StateAssignment variable="v" value="EL"/>
      </OnStart>

      <Regime name="integrating" initial="true">
        <TimeDerivative variable="v" value="(gL * (EL - v) + iSyn) / C"/>
        <OnCondition test="v .gt. vth">
          <EventOut port="spike"/>
          <StateAssignment variable="v" value="vreset"/>
          <Transition regime="refractory"/>
        </OnCondition>
      </Regime>

      <Regime name="refractory">
        <OnEntry>
          <StateAssignment variable="refractoryTimeElapsed" value="0"/>
        </OnEntry>
        <TimeDerivative variable="refractoryTimeElapsed" value="1"/>
        <OnCondition test="refractoryTimeElapsed .geq. t_ref">
          <Transition regime="integrating"/>
        </OnCondition>
      </Regime>

    </Dynamics>
  </ComponentType>

  <ComponentType name="GLIF2Cell" extends="baseCell">
    <Parameter name="C" dimension="capacitance"/>
    <Parameter name="gL" dimension="conductance"/>
    <Parameter name="EL" dimension="voltage"/>
    <Parameter name="vth" dimension="voltage"/>
    <Parameter name="vreset" dimension="voltage"/>
    <Parameter name="resetScale" dimension="none"/>
    <Parameter name="t_ref" dimension="time"/>

    <Attachments name="synapses" type="basePointCurrent"/>

    <EventPort name="spike" direction="out"/>
    <Exposure name="v" dimension="voltage"/>
    <Exposure name="iSyn" dimension="current"/>

    <Dynamics>
      <StateVariable name="v" dimension="voltage" exposure="v"/>
      <StateVariable name="refractoryTimeElapsed" dimension="time"/>
      <DerivedVariable name="iSyn" dimension="current" exposure="iSyn" select="synapses[*]/i" reduce="add"/>

      <OnStart>
        <StateAssignment variable="v" value="EL"/>
      </OnStart>

      <Regime name="integrating" initial="true">
        <TimeDerivative variable="v" value="(gL * (EL - v) + iSyn) / C"/>
        <OnCondition test="v .gt. vth">
          <EventOut port="spike"/>
          <StateAssignment variable="v" value="vreset + resetScale * (v - vth)"/>
          <Transition regime="refractory"/>
        </OnCondition>
      </Regime>

      <Regime name="refractory">
        <OnEntry>
          <StateAssignment variable="refractoryTimeElapsed" value="0"/>
        </OnEntry>
        <TimeDerivative variable="refractoryTimeElapsed" value="1"/>
        <OnCondition test="refractoryTimeElapsed .geq. t_ref">
          <Transition regime="integrating"/>
        </OnCondition>
      </Regime>

    </Dynamics>
  </ComponentType>

  <ComponentType name="GLIF3Cell" extends="baseCell">
    <Parameter name="C" dimension="capacitance"/>
    <Parameter name="gL" dimension="conductance"/>
    <Parameter name="EL" dimension="voltage"/>
    <Parameter name="vth" dimension="voltage"/>
    <Parameter name="vreset" dimension="voltage"/>
    <Parameter name="t_ref" dimension="time"/>
    <Parameter name="tauAsc1" dimension="time"/>
    <Parameter name="tauAsc2" dimension="time"/>
    <Parameter name="ascAdd1" dimension="current"/>
    <Parameter name="ascAdd2" dimension="current"/>

    <Attachments name="synapses" type="basePointCurrent"/>

    <EventPort name="spike" direction="out"/>
    <Exposure name="v" dimension="voltage"/>
    <Exposure name="asc1" dimension="current"/>
    <Exposure name="asc2" dimension="current"/>
    <Exposure name="iSyn" dimension="current"/>

    <Dynamics>
      <StateVariable name="v" dimension="voltage" exposure="v"/>
      <StateVariable name="asc1" dimension="current" exposure="asc1"/>
      <StateVariable name="asc2" dimension="current" exposure="asc2"/>
      <StateVariable name="refractoryTimeElapsed" dimension="time"/>
      <DerivedVariable name="iSyn" dimension="current" exposure="iSyn" select="synapses[*]/i" reduce="add"/>
      <DerivedVariable name="ascSum" dimension="current" value="asc1 + asc2"/>
      <TimeDerivative variable="asc1" value="-asc1 / tauAsc1"/>
      <TimeDerivative variable="asc2" value="-asc2 / tauAsc2"/>

      <OnStart>
        <StateAssignment variable="v" value="EL"/>
        <StateAssignment variable="asc1" value="0"/>
        <StateAssignment variable="asc2" value="0"/>
      </OnStart>

      <Regime name="integrating" initial="true">
        <TimeDerivative variable="v" value="(gL * (EL - v) + iSyn + ascSum) / C"/>
        <OnCondition test="v .gt. vth">
          <EventOut port="spike"/>
          <StateAssignment variable="v" value="vreset"/>
          <StateAssignment variable="asc1" value="asc1 + ascAdd1"/>
          <StateAssignment variable="asc2" value="asc2 + ascAdd2"/>
          <Transition regime="refractory"/>
        </OnCondition>
      </Regime>

      <Regime name="refractory">
        <OnEntry>
          <StateAssignment variable="refractoryTimeElapsed" value="0"/>
        </OnEntry>
        <TimeDerivative variable="refractoryTimeElapsed" value="1"/>
        <OnCondition test="refractoryTimeElapsed .geq. t_ref">
          <Transition regime="integrating"/>
        </OnCondition>
      </Regime>

    </Dynamics>
  </ComponentType>

  <ComponentType name="GLIF4Cell" extends="baseCell">
    <Parameter name="C" dimension="capacitance"/>
    <Parameter name="gL" dimension="conductance"/>
    <Parameter name="EL" dimension="voltage"/>
    <Parameter name="vreset" dimension="voltage"/>
    <Parameter name="t_ref" dimension="time"/>
    <Parameter name="thetaInf" dimension="voltage"/>
    <Parameter name="tauTheta" dimension="time"/>
    <Parameter name="thetaSpikeAdd" dimension="voltage"/>

    <Attachments name="synapses" type="basePointCurrent"/>

    <EventPort name="spike" direction="out"/>
    <Exposure name="v" dimension="voltage"/>
    <Exposure name="theta" dimension="voltage"/>
    <Exposure name="iSyn" dimension="current"/>

    <Dynamics>
      <StateVariable name="v" dimension="voltage" exposure="v"/>
      <StateVariable name="theta" dimension="voltage" exposure="theta"/>
      <StateVariable name="refractoryTimeElapsed" dimension="time"/>
      <DerivedVariable name="iSyn" dimension="current" exposure="iSyn" select="synapses[*]/i" reduce="add"/>
      <TimeDerivative variable="theta" value="(thetaInf - theta) / tauTheta"/>

      <OnStart>
        <StateAssignment variable="v" value="EL"/>
        <StateAssignment variable="theta" value="thetaInf"/>
      </OnStart>

      <Regime name="integrating" initial="true">
        <TimeDerivative variable="v" value="(gL * (EL - v) + iSyn) / C"/>
        <OnCondition test="v .gt. theta">
          <EventOut port="spike"/>
          <StateAssignment variable="v" value="vreset"/>
          <StateAssignment variable="theta" value="theta + thetaSpikeAdd"/>
          <Transition regime="refractory"/>
        </OnCondition>
      </Regime>

      <Regime name="refractory">
        <OnEntry>
          <StateAssignment variable="refractoryTimeElapsed" value="0"/>
        </OnEntry>
        <TimeDerivative variable="refractoryTimeElapsed" value="1"/>
        <OnCondition test="refractoryTimeElapsed .geq. t_ref">
          <Transition regime="integrating"/>
        </OnCondition>
      </Regime>

    </Dynamics>
  </ComponentType>

  <ComponentType name="GLIF5Cell" extends="baseCell">
    <Parameter name="C" dimension="capacitance"/>
    <Parameter name="gL" dimension="conductance"/>
    <Parameter name="EL" dimension="voltage"/>
    <Parameter name="vreset" dimension="voltage"/>
    <Parameter name="t_ref" dimension="time"/>
    <Parameter name="thetaInf" dimension="voltage"/>
    <Parameter name="tauTheta" dimension="time"/>
    <Parameter name="thetaSpikeAdd" dimension="voltage"/>
    <Parameter name="tauAsc1" dimension="time"/>
    <Parameter name="tauAsc2" dimension="time"/>
    <Parameter name="ascAdd1" dimension="current"/>
    <Parameter name="ascAdd2" dimension="current"/>

    <Attachments name="synapses" type="basePointCurrent"/>

    <EventPort name="spike" direction="out"/>
    <Exposure name="v" dimension="voltage"/>
    <Exposure name="theta" dimension="voltage"/>
    <Exposure name="asc1" dimension="current"/>
    <Exposure name="asc2" dimension="current"/>
    <Exposure name="iSyn" dimension="current"/>

    <Dynamics>
      <StateVariable name="v" dimension="voltage" exposure="v"/>
      <StateVariable name="theta" dimension="voltage" exposure="theta"/>
      <StateVariable name="asc1" dimension="current" exposure="asc1"/>
      <StateVariable name="asc2" dimension="current" exposure="asc2"/>
      <StateVariable name="refractoryTimeElapsed" dimension="time"/>
      <DerivedVariable name="iSyn" dimension="current" exposure="iSyn" select="synapses[*]/i" reduce="add"/>
      <DerivedVariable name="ascSum" dimension="current" value="asc1 + asc2"/>
      <TimeDerivative variable="theta" value="(thetaInf - theta) / tauTheta"/>
      <TimeDerivative variable="asc1" value="-asc1 / tauAsc1"/>
      <TimeDerivative variable="asc2" value="-asc2 / tauAsc2"/>

      <OnStart>
        <StateAssignment variable="v" value="EL"/>
        <StateAssignment variable="theta" value="thetaInf"/>
        <StateAssignment variable="asc1" value="0"/>
        <StateAssignment variable="asc2" value="0"/>
      </OnStart>

      <Regime name="integrating" initial="true">
        <TimeDerivative variable="v" value="(gL * (EL - v) + iSyn + ascSum) / C"/>
        <OnCondition test="v .gt. theta">
          <EventOut port="spike"/>
          <StateAssignment variable="v" value="vreset"/>
          <StateAssignment variable="theta" value="theta + thetaSpikeAdd"/>
          <StateAssignment variable="asc1" value="asc1 + ascAdd1"/>
          <StateAssignment variable="asc2" value="asc2 + ascAdd2"/>
          <Transition regime="refractory"/>
        </OnCondition>
      </Regime>

      <Regime name="refractory">
        <OnEntry>
          <StateAssignment variable="refractoryTimeElapsed" value="0"/>
        </OnEntry>
        <TimeDerivative variable="refractoryTimeElapsed" value="1"/>
        <OnCondition test="refractoryTimeElapsed .geq. t_ref">
          <Transition regime="integrating"/>
        </OnCondition>
      </Regime>

    </Dynamics>
  </ComponentType>

</neuroml>
