<Lems>
    <Target component="sim1"/>
    <Include file="Cells.xml"/>
    <Include file="PyNN.xml"/>
    <Include file="Networks.xml"/>
    <Include file="Simulation.xml"/>
    <Include file="pynn_poisson_network.nml"/>

    <Simulation id="sim1" length="2s" step="0.1ms" target="poissonNetwork" seed="1234">
        <EventOutputFile id="spikes" fileName="pynn_poisson_network_spikes.dat" format="TIME_ID">
            <EventSelection id="0" select="sources[0]" eventPort="spike"/>
            <EventSelection id="1" select="sources[1]" eventPort="spike"/>
            <EventSelection id="2" select="sources[2]" eventPort="spike"/>
            <EventSelection id="3" select="sources[3]" eventPort="spike"/>
            <EventSelection id="4" select="sources[4]" eventPort="spike"/>
            <EventSelection id="5" select="sources[5]" eventPort="spike"/>
            <EventSelection id="6" select="sources[6]" eventPort="spike"/>
            <EventSelection id="7" select="sources[7]" eventPort="spike"/>
            <EventSelection id="8" select="sources[8]" eventPort="spike"/>
            <EventSelection id="9" select="sources[9]" eventPort="spike"/>
            <EventSelection id="10" select="sources[10]" eventPort="spike"/>
            <EventSelection id="11" select="sources[11]" eventPort="spike"/>
            <EventSelection id="12" select="sources[12]" eventPort="spike"/>
            <EventSelection id="13" select="sources[13]" eventPort="spike"/>
            <EventSelection id="14" select="sources[14]" eventPort="spike"/>
            <EventSelection id="15" select="sources[15]" eventPort="spike"/>
            <EventSelection id="16" select="sources[16]" eventPort="spike"/>
            <EventSelection id="17" select="sources[17]" eventPort="spike"/>
            <EventSelection id="18" select="sources[18]" eventPort="spike"/>
            <EventSelection id="19" select="sources[19]" eventPort="spike"/>
            <EventSelection id="20" select="sources[20]" eventPort="spike"/>
            <EventSelection id="21" select="sources[21]" eventPort="spike"/>
            <EventSelection id="22" select="sources[22]" eventPort="spike"/>
            <EventSelection id="23" select="sources[23]" eventPort="spike"/>
            <EventSelection id="24" select="sources[24]" eventPort="spike"/>
            <EventSelection id="25" select="sources[25]" eventPort="spike"/>
            <EventSelection id="26" select="sources[26]" eventPort="spike"/>
            <EventSelection id="27" select="sources[27]" eventPort="spike"/>
            <EventSelection id="28" select="sources[28]" eventPort="spike"/>
            <EventSelection id="29" select="sources[29]" eventPort="spike"/>
            <EventSelection id="30" select="sources[30]" eventPort="spike"/>
            <EventSelection id="31" select="sources[31]" eventPort="spike"/>
            <EventSelection id="32" select="sources[32]" eventPort="spike"/>
            <EventSelection id="33" select="sources[33]" eventPort="spike"/>
            <EventSelection id="34" select="sources[34]" eventPort="spike"/>
            <EventSelection id="35" select="sources[35]" eventPort="spike"/>
            <EventSelection id="36" select="sources[36]" eventPort="spike"/>
            <EventSelection id="37" select="sources[37]" eventPort="spike"/>
            <EventSelection id="38" select="sources[38]" eventPort="spike"/>
            <EventSelection id="39" select="sources[39]" eventPort="spike"/>
            <EventSelection id="40" select="sources[40]" eventPort="spike"/>
            <EventSelection id="41" select="sources[41]" eventPort="spike"/>
            <EventSelection id="42" select="sources[42]" eventPort="spike"/>
            <EventSelection id="43" select="sources[43]" eventPort="spike"/>
            <EventSelection id="44" select="sources[44]" eventPort="spike"/>
            <EventSelection id="45" select="sources[45]" eventPort="spike"/>
            <EventSelection id="46" select="sources[46]" eventPort="spike"/>
            <EventSelection id="47" select="sources[47]" eventPort="spike"/>
            <EventSelection id="48" select="sources[48]" eventPort="spike"/>
            <EventSelection id="49" select="sources[49]" eventPort="spike"/>
            <EventSelection id="50" select="sources[50]" eventPort="spike"/>
            <EventSelection id="51" select="sources[51]" eventPort="spike"/>
            <EventSelection id="52" select="sources[52]" eventPort="spike"/>
            <EventSelection id="53" select="sources[53]" eventPort="spike"/>
            <EventSelection id="54" select="sources[54]" eventPort="spike"/>
            <EventSelection id="55" select="sources[55]" eventPort="spike"/>
            <EventSelection id="56" select="sources[56]" eventPort="spike"/>
            <EventSelection id="57" select="sources[57]" eventPort="spike"/>
            <EventSelection id="58" select="sources[58]" eventPort="spike"/>
            <EventSelection id="59" select="sources[59]" eventPort="spike"/>
            <EventSelection id="60" select="sources[60]" eventPort="spike"/>
            <EventSelection id="61" select="sources[61]" eventPort="spike"/>
            <EventSelection id="62" select="sources[62]" eventPort="spike"/>
            <EventSelection id="63" select="sources[63]" eventPort="spike"/>
            <EventSelection id="64" select="sources[64]" eventPort="spike"/>
            <EventSelection id="65" select="sources[65]" eventPort="spike"/>
            <EventSelection id="66" select="sources[66]" eventPort="spike"/>
            <EventSelection id="67" select="sources[67]" eventPort="spike"/>
            <EventSelection id="68" select="sources[68]" eventPort="spike"/>
            <EventSelection id="69" select="sources[69]" eventPort="spike"/>
            <EventSelection id="70" select="sources[70]" eventPort="spike"/>
            <EventSelection id="71" select="sources[71]" eventPort="spike"/>
            <EventSelection id="72" select="sources[72]" eventPort="spike"/>
            <EventSelection id="73" select="sources[73]" eventPort="spike"/>
            <EventSelection id="74" select="sources[74]" eventPort="spike"/>
            <EventSelection id="75" select="sources[75]" eventPort="spike"/>
            <EventSelection id="76" select="sources[76]" eventPort="spike"/>
            <EventSelection id="77" select="sources[77]" eventPort="spike"/>
            <EventSelection id="78" select="sources[78]" eventPort="spike"/>
            <EventSelection id="79" select="sources[79]" eventPort="spike"/>
            <EventSelection id="80" select="sources[80]" eventPort="spike"/>
            <EventSelection id="81" select="sources[81]" eventPort="spike"/>
            <EventSelection id="82" select="sources[82]" eventPort="spike"/>
            <EventSelection id="83" select="sources[83]" eventPort="spike"/>
            <EventSelection id="84" select="sources[84]" eventPort="spike"/>
            <EventSelection id="85" select="sources[85]" eventPort="spike"/>
            <EventSelection id="86" select="sources[86]" eventPort="spike"/>
            <EventSelection id="87" select="sources[87]" eventPort="spike"/>
            <EventSelection id="88" select="sources[88]" eventPort="spike"/>
            <EventSelection id="89" select="sources[89]" eventPort="spike"/>
            <EventSelection id="90" select="sources[90]" eventPort="spike"/>
            <EventSelection id="91" select="sources[91]" eventPort="spike"/>
            <EventSelection id="92" select="sources[92]" eventPort="spike"/>
            <EventSelection id="93" select="sources[93]" eventPort="spike"/>
            <EventSelection id="94" select="sources[94]" eventPort="spike"/>
            <EventSelection id="95" select="sources[95]" eventPort="spike"/>
            <EventSelection id="96" select="sources[96]" eventPort="spike"/>
            <EventSelection id="97" select="sources[97]" eventPort="spike"/>
            <EventSelection id="98" select="sources[98]" eventPort="spike"/>
            <EventSelection id="99" select="sources[99]" eventPort="spike"/>
            <EventSelection id="100" select="expTargets[0]" eventPort="spike"/>
            <EventSelection id="101" select="expTargets[1]" eventPort="spike"/>
            <EventSelection id="102" select="expTargets[2]" eventPort="spike"/>
            <EventSelection id="103" select="expTargets[3]" eventPort="spike"/>
            <EventSelection id="104" select="expTargets[4]" eventPort="spike"/>
            <EventSelection id="105" select="expTargets[5]" eventPort="spike"/>
            <EventSelection id="106" select="expTargets[6]" eventPort="spike"/>
            <EventSelection id="107" select="expTargets[7]" eventPort="spike"/>
            <EventSelection id="108" select="expTargets[8]" eventPort="spike"/>
            <EventSelection id="109" select="expTargets[9]" eventPort="spike"/>
            <EventSelection id="110" select="expTargets[10]" eventPort="spike"/>
            <EventSelection id="111" select="expTargets[11]" eventPort="spike"/>
            <EventSelection id="112" select="expTargets[12]" eventPort="spike"/>
            <EventSelection id="113" select="expTargets[13]" eventPort="spike"/>
            <EventSelection id="114" select="expTargets[14]" eventPort="spike"/>
            <EventSelection id="115" select="expTargets[15]" eventPort="spike"/>
            <EventSelection id="116" select="expTargets[16]" eventPort="spike"/>
            <EventSelection id="117" select="expTargets[17]" eventPort="spike"/>
            <EventSelection id="118" select="expTargets[18]" eventPort="spike"/>
            <EventSelection id="119" select="expTargets[19]" eventPort="spike"/>
            <EventSelection id="120" select="expTargets[20]" eventPort="spike"/>
            <EventSelection id="121" select="expTargets[21]" eventPort="spike"/>
            <EventSelection id="122" select="expTargets[22]" eventPort="spike"/>
            <EventSelection id="123" select="expTargets[23]" eventPort="spike"/>
            <EventSelection id="124" select="expTargets[24]" eventPort="spike"/>
            <EventSelection id="125" select="expTargets[25]" eventPort="spike"/>
            <EventSelection id="126" select="expTargets[26]" eventPort="spike"/>
            <EventSelection id="127" select="expTargets[27]" eventPort="spike"/>
            <EventSelection id="128" select="expTargets[28]" eventPort="spike"/>
            <EventSelection id="129" select="expTargets[29]" eventPort="spike"/>
            <EventSelection id="130" select="expTargets[30]" eventPort="spike"/>
            <EventSelection id="131" select="expTargets[31]" eventPort="spike"/>
            <EventSelection id="132" select="expTargets[32]" eventPort="spike"/>
            <EventSelection id="133" select="expTargets[33]" eventPort="spike"/>
            <EventSelection id="134" select="expTargets[34]" eventPort="spike"/>
            <EventSelection id="135" select="expTargets[35]" eventPort="spike"/>
            <EventSelection id="136" select="expTargets[36]" eventPort="spike"/>
            <EventSelection id="137" select="expTargets[37]" eventPort="spike"/>
            <EventSelection id="138" select="expTargets[38]" eventPort="spike"/>
            <EventSelection id="139" select="expTargets[39]" eventPort="spike"/>
            <EventSelection id="140" select="expTargets[40]" eventPort="spike"/>
            <EventSelection id="141" select="expTargets[41]" eventPort="spike"/>
            <EventSelection id="142" select="expTargets[42]" eventPort="spike"/>
            <EventSelection id="143" select="expTargets[43]" eventPort="spike"/>
            <EventSelection id="144" select="expTargets[44]" eventPort="spike"/>
            <EventSelection id="145" select="expTargets[45]" eventPort="spike"/>
            <EventSelection id="146" select="expTargets[46]" eventPort="spike"/>
            <EventSelection id="147" select="expTargets[47]" eventPort="spike"/>
            <EventSelection id="148" select="expTargets[48]" eventPort="spike"/>
            <EventSelection id="149" select="expTargets[49]" eventPort="spike"/>
            <EventSelection id="150" select="alphaTargets[0]" eventPort="spike"/>
            <EventSelection id="151" select="alphaTargets[1]" eventPort="spike"/>
            <EventSelection id="152" select="alphaTargets[2]" eventPort="spike"/>
            <EventSelection id="153" select="alphaTargets[3]" eventPort="spike"/>
            <EventSelection id="154" select="alphaTargets[4]" eventPort="spike"/>
            <EventSelection id="155" select="alphaTargets[5]" eventPort="spike"/>
            <EventSelection id="156" select="alphaTargets[6]" eventPort="spike"/>
            <EventSelection id="157" select="alphaTargets[7]" eventPort="spike"/>
            <EventSelection id="158" select="alphaTargets[8]" eventPort="spike"/>
            <EventSelection id="159" select="alphaTargets[9]" eventPort="spike"/>
            <EventSelection id="160" select="alphaTargets[10]" eventPort="spike"/>
            <EventSelection id="161" select="alphaTargets[11]" eventPort="spike"/>
            <EventSelection id="162" select="alphaTargets[12]" eventPort="spike"/>
            <EventSelection id="163" select="alphaTargets[13]" eventPort="spike"/>
            <EventSelection id="164" select="alphaTargets[14]" eventPort="spike"/>
            <EventSelection id="165" select="alphaTargets[15]" eventPort="spike"/>
            <EventSelection id="166" select="alphaTargets[16]" eventPort="spike"/>
            <EventSelection id="167" select="alphaTargets[17]" eventPort="spike"/>
            <EventSelection id="168" select="alphaTargets[18]" eventPort="spike"/>
            <EventSelection id="169" select="alphaTargets[19]" eventPort="spike"/>
            <EventSelection id="170" select="alphaTargets[20]" eventPort="spike"/>
            <EventSelection id="171" select="alphaTargets[21]" eventPort="spike"/>
            <EventSelection id="172" select="alphaTargets[22]" eventPort="spike"/>
            <EventSelection id="173" select="alphaTargets[23]" eventPort="spike"/>
            <EventSelection id="174" select="alphaTargets[24]" eventPort="spike"/>
            <EventSelection id="175" select="alphaTargets[25]" eventPort="spike"/>
            <EventSelection id="176" select="alphaTargets[26]" eventPort="spike"/>
            <EventSelection id="177" select="alphaTargets[27]" eventPort="spike"/>
            <EventSelection id="178" select="alphaTargets[28]" eventPort="spike"/>
            <EventSelection id="179" select="alphaTargets[29]" eventPort="spike"/>
            <EventSelection id="180" select="alphaTargets[30]" eventPort="spike"/>
            <EventSelection id="181" select="alphaTargets[31]" eventPort="spike"/>
            <EventSelection id="182" select="alphaTargets[32]" eventPort="spike"/>
            <EventSelection id="183" select="alphaTargets[33]" eventPort="spike"/>
            <EventSelection id="184" select="alphaTargets[34]" eventPort="spike"/>
            <EventSelection id="185" select="alphaTargets[35]" eventPort="spike"/>
            <EventSelection id="186" select="alphaTargets[36]" eventPort="spike"/>
            <EventSelection id="187" select="alphaTargets[37]" eventPort="spike"/>
            <EventSelection id="188" select="alphaTargets[38]" eventPort="spike"/>
            <EventSelection id="189" select="alphaTargets[39]" eventPort="spike"/>
            <EventSelection id="190" select="alphaTargets[40]" eventPort="spike"/>
            <EventSelection id="191" select="alphaTargets[41]" eventPort="spike"/>
            <EventSelection id="192" select="alphaTargets[42]" eventPort="spike"/>
            <EventSelection id="193" select="alphaTargets[43]" eventPort="spike"/>
            <EventSelection id="194" select="alphaTargets[44]" eventPort="spike"/>
            <EventSelection id="195" select="alphaTargets[45]" eventPort="spike"/>
            <EventSelection id="196" select="alphaTargets[46]" eventPort="spike"/>
            <EventSelection id="197" select="alphaTargets[47]" eventPort="spike"/>
            <EventSelection id="198" select="alphaTargets[48]" eventPort="spike"/>
            <EventSelection id="199" select="alphaTargets[49]" eventPort="spike"/>
        </EventOutputFile>
    </Simulation>
</Lems>
