<neuroml xmlns="http://www.neuroml.org/schema/neuroml2" id="PynnPoissonNetwork">
  <!-- Written by tests/fixtures/reference/make_poisson_network.py; do not edit by hand. -->
  <expCurrSynapse id="expSynapse" tau_syn="5"/>
  <alphaCurrSynapse id="alphaSynapse" tau_syn="5"/>
  <IF_curr_exp id="expCell" cm="1" i_offset="0" tau_m="20" tau_refrac="5" v_init="-65" v_reset="-70" v_rest="-65" v_thresh="-50" tau_syn_E="5" tau_syn_I="5"/>
  <IF_curr_alpha id="alphaCell" cm="1" i_offset="0" tau_m="20" tau_refrac="5" v_init="-65" v_reset="-70" v_rest="-65" v_thresh="-50" tau_syn_E="5" tau_syn_I="5"/>
  <spikeGeneratorPoisson id="poissonSource" averageRate="20 Hz"/>
  <network id="poissonNetwork">
    <population id="sources" component="poissonSource" size="100"/>
    <population id="expTargets" component="expCell" size="50"/>
    <population id="alphaTargets" component="alphaCell" size="50"/>
    <projection id="expTargetsProjection" presynapticPopulation="sources" postsynapticPopulation="expTargets" synapse="expSynapse">
      <connectionWD id="0" preCellId="../sources[1]" postCellId="../expTargets[0]" weight="0.3" delay="2 ms"/>
      <connectionWD id="1" preCellId="../sources[4]" postCellId="../expTargets[0]" weight="0.3" delay="2 ms"/>
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    </projection>
    <projection id="alphaTargetsProjection" presynapticPopulation="sources" postsynapticPopulation="alphaTargets" synapse="alphaSynapse">
      <connectionWD id="0" preCellId="../sources[6]" postCellId="../alphaTargets[0]" weight="0.11" delay="2 ms"/>
      <connectionWD id="1" preCellId="../sources[7]" postCellId="../alphaTargets[0]" weight="0.11" delay="2 ms"/>
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    </projection>
  </network>
</neuroml>
